# AguaClara Water Treatment Plants
# Automated Design
# Add variable descriptions next to every varible so it is easy to interpret what this all means.
# Design References
# [reference: BasicInputs.xmcd]
# Use BasicClientInputs and ExpertClientInputs when this is run by LabVIEW.
# Use BasicInputs and ExpertInputs to use the program in MathCAD
# Change the reference by
# - right clicking
# - select properties
# - reference tab
# - type in the correct file name
# [reference: ExpertInputs.xmcd]
B_SedPlateFramePipes = 0.3 m
# [reference: DesignAssumptions.xmcd]
# [reference: MathFunctions.xmcd]
# [reference: PipeDatabase.xmcd]
Q_Plant = 22 L/s
# [reference: MinorLossCoefficients.xmcd]
# [reference: FluidsFunctions.xmcd]
# [reference: Sedimentation Tank.xmcd]
# [reference: Flocculator.xmcd]
# [reference: Rapid Mix.xmcd]
# [reference: EntranceTankDim.xmcd]
# [reference: Chemical Doser temp.xmcd]
# [reference: ChemStorageCylinders.xmcd]
# [reference: Materials List.xmcd]
W_SedBay = 1.08 m
N_SedTanks = 4
W_ExitChannelMin = 0.3048 m
W_SedBay = 1.08 m
N_SedBays = 1
# Sed Tanks and Slopes:
Geom_ExitChannel = 1
N_SedTanks = 4
H_SedBetween = 0 cm  # Distance from the top of the inlet manifold to the bottom of the ledge supporting the lamella frame
L_Sed = 6.75151 m
N_SedBays = 1  # Number of bays of inlet manifolds in each sed tank
# Length of the port through which water exits the inlet manifold
# Width of ferrous cement plates in whice one manifold port is cut
Q_SedBay = 5.5 L/s
# Sedimentation Tank Sludge Drain:
N_SedSludgeOrifices = 67  # per cell
Ti_SludgeDrain = 30 min  # Tank Drain time
W_SedSludge = 13.1575 cm  # Width of the sludge channel
B_SedSludgeOrifices = 10 cm  # Distance center to center between drain orifices
H_SedSludge = 6.57873 cm  # Depth of the sludge channel
T_SedSludge = 5 cm
T_SedSludge = 5 cm
# Thickness of the plate topping the sludge channel
# through which drain holes are formed
W_SedDrainCover = 23.1575 cm
D_SedSludgeOrifice = 0.01 m  # Diameter of drain orifices
W_SedInletBottom = 0.424213 m
N_SedSludgeOrifices = 67
ND_SedSludgeValve = 3 in
# Sedimentation Tank Dimensions:
Z_SedSludge = 0.115787 m  # Height from 0 of the top of the sludge drain
Z_SedSlopes = 0.807244 m  # Height from 0 of the top of the inlet manifold
W_Sed = 1.08 m  # Total tank wall height
L_Sed = 6.75151 m  # Total tank length
# Inlet Channel:
HW_InletChannel = 0.331806 m  # Width of the drop chimneys connecting channel to sed inlet manifolds
W_InletChannel = 0.495622 m  # length of drop chimmneys
L_Channel = 5.07 m
N_SedInletPipes = 2  # per sed bay
H_InletChannel = 0.431806 m
# Sedimentation Tank Effluent Launder:
N_SedLaunderOrifices = 108  # Number of orifices per launder
Q_SedLaunderOrifices = 5.16246e-5 m^3/s  # More Launder Dimensions
ND_SedLaunder = 6 in
B_SedLaunderOrifices = 0.0989164 m  # Center to center launder spacing
L_SedLaunder = 5.47631 m
# Exit Channel:
D_SedLaunderOrifice = 0.433071 in
W_ExitChannel = 0.479573 m
H_ExitChannel = 0.431806 m
L_ExitChannel = 5.07 m
H_PltWeir = 0.341806 m  # height of the weir carrying water to the distribution tank
HW_ExitChannel = 0.291806 m  # water height in exit channel from 0
# Lamella:
L_SedPlate = 0.522571 m
B_SedPlate = 2.9653 cm  # center to center distance between lamella
S_SedPlate = 2.7653 cm  # spacing between lamella
N_SedPlates = 156  # Number of Sed Plates per Sedimentation Tank Bay.
AN_SedPlate = 60 deg
V_SedC = 9.61921 m/day
L_SedActive = 5.34148 m
T
V_SedUp = 65.1706 m/day
Z_SedLaunder = 1.4822 m
H_SedPlate = 0.45256 m
H_SedAbove = 0.206183 m  # Height of water needed above the lamella
N_SedPlates = 156
HW_Sed = 1.60425 m
H_Sed = 1.70425 m
Z_Mp = 1.27244 m
H_SedBayDivider = 0.807244 m
# Flocculator: | Look at Flocculator Positioning arrays
W_FlocChannel = 0.54 m
# Fill last channel with bafffles from last channel
# Fix port width to be based on energy dissipation in that channel
ED_Floc = 6 mW/kg
# Adjust spacing after the number of baffles per channel is known.
# Check the residence time of the flocculator should be at least 20minutes
HW_FlocEnd = 1.60425 m
X_FlocBaffles = [
    0.276212, 0.276212, 0.276212, 0.351806;
    0.534424, 0.534424, 0.534424, 0.617958;
    0.792636, 0.792636, 0.792636, 0.88411;
    1.05085, 1.05085, 1.05085, 1.15026;
    1.30906, 1.30906, 1.30906, 1.41641;
    1.56727, 1.56727, 1.56727, 1.68256;
    1.82548, 1.82548, 1.82548, 1.94872;
    2.08369, 2.08369, 2.08369, 2.21487;
    2.34191, 2.34191, 2.34191, 2.48102;
    2.60012, 2.60012, 2.60012, 2.74717;
    2.85833, 2.85833, 2.85833, 3.01332;
    3.11654, 3.11654, 3.11654, 3.27948;
    3.37475, 3.37475, 3.37475, 3.54563;
    3.63297, 3.63297, 3.63297, 3.81178;
    3.89118, 3.89118, 3.89118, 4.07793;
    4.14939, 4.14939, 4.14939, 4.34408;
    4.4076, 4.4076, 4.4076, 4.61023;
    4.66581, 4.66581, 4.66581, 4.87639;
    4.92402, 4.92402, 4.92402, 5.14254;
    5.18224, 5.18224, 5.18224, 5.40869;
    5.44045, 5.44045, 5.44045, 5.67484;
    5.69866, 5.69866, 5.69866, 5.94099;
    5.95687, 5.95687, 5.95687, 6.20714;
    6.21508, 6.21508, 6.21508, 6.4733;
    6.4733, 6.4733, 6.4733, 0
] m
L_FlocBaffles = [
    1.34804, 1.34804, 1.34804, 1.65979;
    1.65979, 1.65979, 1.65979, 1.34804;
    1.34804, 1.34804, 1.34804, 1.65979;
    1.65979, 1.65979, 1.65979, 1.34804;
    1.34804, 1.34804, 1.34804, 1.65979;
    1.65979, 1.65979, 1.65979, 1.34804;
    1.34804, 1.34804, 1.34804, 1.65979;
    1.65979, 1.65979, 1.65979, 1.34804;
    1.34804, 1.34804, 1.34804, 1.65979;
    1.65979, 1.65979, 1.65979, 1.34804;
    1.34804, 1.34804, 1.34804, 1.65979;
    1.65979, 1.65979, 1.65979, 1.34804;
    1.34804, 1.34804, 1.34804, 1.65979;
    1.65979, 1.65979, 1.65979, 1.34804;
    1.34804, 1.34804, 1.34804, 1.65979;
    1.65979, 1.65979, 1.65979, 1.34804;
    1.34804, 1.34804, 1.34804, 1.65979;
    1.65979, 1.65979, 1.65979, 1.34804;
    1.34804, 1.34804, 1.34804, 1.65979;
    1.65979, 1.65979, 1.65979, 1.34804;
    1.34804, 1.34804, 1.34804, 1.65979;
    1.65979, 1.65979, 1.65979, 1.34804;
    1.34804, 1.34804, 1.34804, 1.65979;
    1.65979, 1.65979, 1.65979, 1.34804;
    1.34804, 1.34804, 1.34804, 0
] m
Z_FlocBaffles = [
    0, 0, 0, 0.264152;
    0.256212, 0.256212, 0.256212, 0;
    0, 0, 0, 0.264152;
    0.256212, 0.256212, 0.256212, 0;
    0, 0, 0, 0.264152;
    0.256212, 0.256212, 0.256212, 0;
    0, 0, 0, 0.264152;
    0.256212, 0.256212, 0.256212, 0;
    0, 0, 0, 0.264152;
    0.256212, 0.256212, 0.256212, 0;
    0, 0, 0, 0.264152;
    0.256212, 0.256212, 0.256212, 0;
    0, 0, 0, 0.264152;
    0.256212, 0.256212, 0.256212, 0;
    0, 0, 0, 0.264152;
    0.256212, 0.256212, 0.256212, 0;
    0, 0, 0, 0.264152;
    0.256212, 0.256212, 0.256212, 0;
    0, 0, 0, 0.264152;
    0.256212, 0.256212, 0.256212, 0;
    0, 0, 0, 0.264152;
    0.256212, 0.256212, 0.256212, 0;
    0, 0, 0, 0.264152;
    0.256212, 0.256212, 0.256212, 0;
    0, 0, 0, 0
] m
N_FlocChannels = 4
L_FlocTank = 27.006 m
HL_Floc = 26.1751 cm
HW_FlocStart = 1.866 m
S_FlocBaffle = [25.6212; 25.6212; 25.6212; 26.4152] cm
B_FlocBaffle = [25.8212; 25.8212; 25.8212; 26.6152] cm
N_FlocChannelBaffles = [25; 25; 25; 24]
W_FlocPort = [0.256212; 0.256212; 0.256212; 0.26814] m
HL_FlocChannels = [6.70366; 6.70366; 6.70366; 6.06415] cm
L_FlocBaffleLower = 1.34804 m
L_FlocBaffleUpper = 1.65979 m
H_FlocPort = [0.54; 0.54; 0.54; 0.531968] m
Ti_Floc = 17.7236 min  # residence time of the flocculator
N_FlocBaffles = 99
# Materials List:
N_Launders = 4
L_LaunderPipeTotal = 21.9053 m
N_Valves = 4
N_LaunderCouplings = 4
N_ValveCouplings = 4
N_SedPlatesTotal = 624
N_SedPlatesPerSheet = 7
N_SedPlateSheets = 90
# [reference: AutoCADMasterProgram.xmcd]
# AutoCAD References
AC_SedTank =  # no stored result
AC_EntranceTank =  # no stored result
AC_FlocTank = [
    "-layer m FlocTank"; "c t 132,132,132"; "FlocTank"; "  "; "_-view o t _zoom w 0.16,4.76,0 -6.91151,7.69,1.966 _box 0,4.92,0 -6.75151,7.53,1.966 _box 0.15,4.77,-0.15 -6.90151,7.68,1.966 _subtract 0.15,4.77,-0.15  0,4.92,0 "; "_box -6.90151,5.46,0 0.15,5.61,1.966"; "_box -6.90151,6.15,0 0.15,6.3,1.966"; "_box -6.90151,6.84,0 0.15,6.99,1.966"; "-group c FlocTank y "; "all "
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]
AC_ChemTanks = ["-layer m alumtanks"; "c t 132,132,132"; "alumtanks"; "  "; "_-view o t"; "_cylinder -0.075,8.31529,3.09136 0.55686 1.66058"; "_cylinder -0.075,8.31529,3.09636 0.55186 1.65558"; "_-view o t"; "_subtract -0.63186,8.31529,3.09136  -0.62686,8.31529,3.09136 "; "_mirror all  -0.085,7.70843 -0.065,7.70843 "; "_union all "; "-layer s 0"; "  "; "-layer f alumtanks"; "  "]
AC_DrainChannel = [
    "_-view o t"; "-layer m DrainChannel"; "c t 214,214,214"; "DrainChannel"; "  "; "3dpoly "; "-7.69713,-0.99124,-0.3"; "-7.69713,-0.99124,-0.59324"; "-7.29932,-0.99124,-0.84105"; "-6.90151,-0.99124,-0.59324"
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]
